// SBML level 2 version 4

model New_Model()
  // Lever2014 - Phenotypic models of T cell activation.
  // This is a phenotypic model of a kinetic proofreading mechanism used to describe dynamics governing interactions between T cell receptors and peptide-MHC complexes.

  // Compartments:
  compartment compartment = 1;

  // Species:
  species C0 in compartment = 30000;
  species C1 in compartment = 0;
  species C2 in compartment = 0;
  species C3 in compartment = 0;
  species C4 in compartment = 0;
  species C5 in compartment = 0;
  species C6 in compartment = 0;
  species C7 in compartment = 0;
  species C8 in compartment = 0;
  species C9 in compartment = 0;
  species C10 in compartment = 0;
  species P in compartment = 0;
  species T in compartment = 0;

  // Parameters:
  k_on = 0.0001 unit_0;
  k_off = 0.001 unit_0;
  k_p = 0.252 unit_0;
  gamma = 0.00044;
  T_Total = 30000;
  Initial_for_T_Total = T_Total;
  Initial_for_k_off = k_off;
  Initial_for_k_on = k_on;

  // Assignment rules:
  K_D := Initial_for_k_off/Initial_for_k_on;
  sumC := C0 + C1 + C2 + C3 + C4 + C5 + C6 + C7 + C8 + C9 + C10;
  Activation_Normalised := C10/Initial_for_T_Total;

  // Reactions:
  TCR_Binding: P + T => C0; compartment*k_on*P*T;
  C0_Dissociation: C0 => T; compartment*k_off*C0;
  C1_Dissociation: C1 => P; compartment*k_off*C1;
  C2_Dissociation: C2 => P; compartment*k_off*C2;
  C3_Dissociation: C3 => P; compartment*k_off*C3;
  C4_Dissociation: C4 => P; compartment*k_off*C4;
  C5_Dissociation: C5 => P; compartment*k_off*C5;
  C6_Dissociation: C6 => P; compartment*k_off*C6;
  C7_Dissociation: C7 => P; compartment*k_off*C7;
  C8_Dissociation: C8 => P; compartment*k_off*C8;
  C9_Dissociation: C9 => P; compartment*k_off*C9;
  C10_Dissociation: C10 => P; compartment*k_off*C10;
  C1_Formation: C0 => C1; compartment*k_p*C0;
  C2_Formation: C1 => C2; compartment*k_p*C1;
  C3_Formation: C2 => C3; compartment*k_p*C2;
  C4_Formation: C3 => C4; compartment*k_p*C3;
  C5_Formation: C4 => C5; compartment*k_p*C4;
  C6_Formation: C5 => C6; compartment*k_p*C5;
  C7_Formation: C6 => C7; compartment*k_p*C6;
  C8_Formation: C7 => C8; compartment*k_p*C7;
  C9_Formation: C8 => C9; compartment*k_p*C8;
  C10_Formation: C9 => C10; compartment*k_p*C9;

  // Unit definitions:
  unit volume = 1e-3 litre;
  unit substance = 1e-3 mole;
  unit unit_0 = 1 / second; unit_0 is "1/s";
end
